// P-T curve is per unit of rated Pmpp vs temperature
// This one is for a Pmpp stated at 25 deg

New XYCurve.MyPvsT npts=4 xarray=[0 25 75 100] yarray=[1.2 1.0 0.8 0.6]  !interpolated linearly between defined points - max power point

// efficiency curve is per unit eff vs per unit power

New XYCurve.MyEff npts=4 xarray=[.1 .2 .4 1.0] yarray=[.86 .9 .93 .97] ! temperature and efficiency (interpolated lineary between defined points)

// per unit irradiance curve (per unit if "irradiance" property)

New Loadshape.Irrad_1 npts=576 minterval=15 mult=[0, 0, 0, 0, 0, 0, 0, 0, 0, 0, 0, 0, 0, 0, 0, 0, 0, 0, 0, 0, 0, 0, 0, 0.000861111]
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
New Loadshape.Irrad_1h npts=144 interval=1 mult=[0, 0, 0, 0, 0, 0, 0.001277778, 0.088444444, 0.335888889, 0.575027778, 0.779055556, 0.947083333, 1.000333333, 0.953777778, 0.960222222, 0.692555556, 0.340861111, 0.344888889, 0.146583333, 0.017916667, 0, 0, 0, 0]
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
New Loadshape.Irrad_2 npts=144 interval=1 mult=[0, 0, 0, 0, 0, 0, 0.001277778, 0.088444444, 0.335888889, 0.575027778, 0.779055556, 0.947083333, 1.000333333, 0.953777778, 0.960222222, 0.692555556, 0.340861111, 0.344888889, 0.146583333, 0.017916667, 0, 0, 0, 0]
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

// 24-hr temp shape curve
New Tshape.Temp_1 npts=144 interval=1 temp=[22.8, 22.8, 22.5, 22.2, 21.7, 21, 20.9, 23.1, 30.6, 37.8, 42, 47.43, 55.29, 57.57, 55.87, 46.88, 39.9, 34.32, 27.9, 27.1, 26.2, 24.9, 23.6, 20.6]
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
New Tshape.Temp_2 npts=144 interval=1 temp=[22.8, 22.8, 22.5, 22.2, 21.7, 21, 20.9, 23.1, 30.6, 37.8, 42, 47.43, 55.29, 57.57, 55.87, 46.88, 39.9, 34.32, 27.9, 27.1, 26.2, 24.9, 23.6, 20.6]
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